<?xml version="1.0" encoding="ISO-8859-1"?>
<neuroml xmlns="http://www.neuroml.org/schema/neuroml2"
         xmlns:xsi="http://www.w3.org/2001/XMLSchema-instance"
         xsi:schemaLocation="http://www.neuroml.org/schema/neuroml2 https://raw.github.com/NeuroML/NeuroML2/development/Schemas/NeuroML2/NeuroML_v2beta3.xsd"
         id="CaPool">

    <notes>A simple decaying Ca pool. Not appropriate for muscle model? Needs replacing!</notes>

    <fixedFactorConcentrationModel id="CaPool" ion="ca" restingConc="6.41889e-8 mM" decayConstant="11.5943 ms" rho="0.1 mol_per_m_per_A_per_s"/>

</neuroml>
