<Lems>

<!-- Specify which component to run -->
<Target component="sim1"/>

<!-- Include core NeuroML2 ComponentType definitions -->
<Include file="Cells.xml"/>
<Include file="Networks.xml"/>
<Include file="Simulation.xml"/>

<Include file="Leak.nml"/>
<Include file="k_slow.nml"/>
<Include file="k_fast.nml"/>
<Include file="ca_boyle.nml"/>
<Include file="SingleCompMuscleCell.nml"/>

<pulseGenerator id="offsetToMin70" delay="0ms" duration="1000ms" amplitude="-120 pA" />

<pulseGenerator id="pulseGen1" delay="10ms" duration="20ms" amplitude="100 pA" />
<pulseGenerator id="pulseGen2" delay="10ms" duration="20ms" amplitude="200 pA" />
<pulseGenerator id="pulseGen3" delay="10ms" duration="20ms" amplitude="300 pA" />
<pulseGenerator id="pulseGen4" delay="10ms" duration="20ms" amplitude="400 pA" />
<pulseGenerator id="pulseGen5" delay="10ms" duration="20ms" amplitude="500 pA" />
<pulseGenerator id="pulseGen6" delay="10ms" duration="20ms" amplitude="600 pA" />
<pulseGenerator id="pulseGen7" delay="10ms" duration="20ms" amplitude="700 pA" />

<network id="net1">
    <population id="mc1" component="SingleCompMuscleCell" size="1"/>
    <population id="mc2" component="SingleCompMuscleCell" size="1"/>
    <population id="mc3" component="SingleCompMuscleCell" size="1"/>
    <population id="mc4" component="SingleCompMuscleCell" size="1"/>
    <population id="mc5" component="SingleCompMuscleCell" size="1"/>
    <population id="mc6" component="SingleCompMuscleCell" size="1"/>
    <population id="mc7" component="SingleCompMuscleCell" size="1"/>

    <explicitInput target="mc1[0]" input="offsetToMin70"/>
    <explicitInput target="mc2[0]" input="offsetToMin70"/>
    <explicitInput target="mc3[0]" input="offsetToMin70"/>
    <explicitInput target="mc4[0]" input="offsetToMin70"/>
    <explicitInput target="mc5[0]" input="offsetToMin70"/>
    <explicitInput target="mc6[0]" input="offsetToMin70"/>
    <explicitInput target="mc7[0]" input="offsetToMin70"/>

    <explicitInput target="mc1[0]" input="pulseGen1"/>
    <explicitInput target="mc2[0]" input="pulseGen2"/>
    <explicitInput target="mc3[0]" input="pulseGen3"/>
    <explicitInput target="mc4[0]" input="pulseGen4"/>
    <explicitInput target="mc5[0]" input="pulseGen5"/>
    <explicitInput target="mc6[0]" input="pulseGen6"/>
    <explicitInput target="mc7[0]" input="pulseGen7"/>
</network>

<Simulation id="sim1" length="50ms" step="0.01ms" target="net1">

    <Display id="d1" title="Voltage responses at 100pA to 700 pA" timeScale="1ms" xmin="0" xmax="50" ymin="-75" ymax="50">
        <Line id="l1" quantity="mc1[0]/v" scale="1mV"  color="#ffffff" timeScale="1ms"/>
        <Line id="l2" quantity="mc2[0]/v" scale="1mV"  color="#ffffdd" timeScale="1ms"/>
        <Line id="l3" quantity="mc3[0]/v" scale="1mV"  color="#ffffbb" timeScale="1ms"/>
        <Line id="l4" quantity="mc4[0]/v" scale="1mV"  color="#ffddbb" timeScale="1ms"/>
        <Line id="l5" quantity="mc5[0]/v" scale="1mV"  color="#ffbbbb" timeScale="1ms"/>
        <Line id="l6" quantity="mc6[0]/v" scale="1mV"  color="#ddffbb" timeScale="1ms"/>
        <Line id="l7" quantity="mc7[0]/v" scale="1mV"  color="#bbffbb" timeScale="1ms"/>
    </Display>

     <Display id="d2" title="Rate variables at 700 pA" timeScale="1ms" xmin="0" xmax="50" ymin="-0.1" ymax="1.1">

        <Line id="l1" quantity="mc7[0]/biophys/membraneProperties/k_slow_all/k_slow/n/q" scale="1"  color="#000000" timeScale="1ms"/>
        <Line id="l2" quantity="mc7[0]/biophys/membraneProperties/k_fast_all/k_fast/p/q" scale="1"  color="#0000ff" timeScale="1ms"/>
        <Line id="l3" quantity="mc7[0]/biophys/membraneProperties/k_fast_all/k_fast/q/q" scale="1"  color="#00ffff" timeScale="1ms"/>
        <Line id="l4" quantity="mc7[0]/biophys/membraneProperties/ca_boyle_all/ca_boyle/e/q" scale="1"  color="#ff00ff" timeScale="1ms"/>
        <Line id="l5" quantity="mc7[0]/biophys/membraneProperties/ca_boyle_all/ca_boyle/f/q" scale="1"  color="#ffff00" timeScale="1ms"/>
    </Display>

    <Display id="d4" title="Current densities at 700 pA" timeScale="1ms" xmin="0" xmax="50" ymin="-1050" ymax="250">
        <Line id="li0" quantity="mc7[0]/biophys/membraneProperties/Leak_all/iDensity" scale="1uA_per_cm2"  color="#550000" timeScale="1ms"/>
        <Line id="li1" quantity="mc7[0]/biophys/membraneProperties/k_slow_all/iDensity" scale="1uA_per_cm2"  color="#005500" timeScale="1ms"/>
        <Line id="li2" quantity="mc7[0]/biophys/membraneProperties/k_fast_all/iDensity" scale="1uA_per_cm2"  color="#000055" timeScale="1ms"/>
        <Line id="li3" quantity="mc7[0]/biophys/membraneProperties/ca_boyle_all/iDensity" scale="1uA_per_cm2"  color="#fff555" timeScale="1ms"/>

    </Display>

</Simulation>

</Lems>
